** written by FreeCAD inp file writer for CalculiX,Abaqus meshes
** highest dimension mesh elements only.

** Nodes
*Node, NSET=Nall
1, 590, 470, 10
2, 590, -470, 10
3, -590, -470, 10
4, -590, 470, 10
5, 590, 470, 150
6, 590, -470, 150
7, -590, -470, 150
8, -590, 470, 150
9, -480, 540, 90
10, -60, 540, 90
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

** Volume elements
*Element, TYPE=C3D4, ELSET=Evolumes
48056, 20963, 21358, 20997, 21438
48057, 7471, 13257, 1150, 13256
48058, 21286, 21287, 21186, 20898
48059, 20690, 326, 21077, 325
48060, 16551, 167, 16550, 18046
48061, 21801, 19462, 19398, 19461
48062, 16606, 3215, 3216, 18105
48063, 3485, 3445, 3460, 3484
48064, 18022, 18765, 18800, 18795
48065, 19586, 19691, 20457, 20456
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
** Define element set Eall
*ELSET, ELSET=Eall
Evolumes


***********************************************************
** Element sets for materials and FEM element type (solid, shell, beam, fluid)
*ELSET,ELSET=MaterialSolidSolid
48056,
48058,
48059,
48060,
48061,
48062,
48063,
48064,
48065,
48066,
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*ELSET,ELSET=MaterialSolid001Solid
48057,
48069,
48083,
48085,
48090,
48092,
48125,
48139,
48224,
48229,
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
***********************************************************
** constraints fixed node sets
** ConstraintFixed
*NSET,NSET=ConstraintFixed
9,
10,
11,
12,
13,
14,
15,
16,
17,
18,
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
** Physical constants for SI(mm) unit system with Kelvins
*PHYSICAL CONSTANTS, ABSOLUTE ZERO=0, STEFAN BOLTZMANN=5.670374419e-11

***********************************************************
** Materials
** see information about units at file end
** FreeCAD material name: Aluminum-6061-T6
** MaterialSolid-design
*MATERIAL, NAME=MaterialSolid
*ELASTIC
69000,0.33
** FreeCAD material name: Aluminum-6061-T6
** MaterialSolid-nondesign
*MATERIAL, NAME=MaterialSolid001
*ELASTIC
69000,0.33

***********************************************************
** Sections
*SOLID SECTION, ELSET=MaterialSolidSolid, MATERIAL=MaterialSolid
*SOLID SECTION, ELSET=MaterialSolid001Solid, MATERIAL=MaterialSolid001

***********************************************************
** At least one step is needed to run an CalculiX analysis of FreeCAD
*STEP, INC=2000
*STATIC


***********************************************************
** Fixed Constraints
** ConstraintFixed
*BOUNDARY
ConstraintFixed,1
ConstraintFixed,2
ConstraintFixed,3


***********************************************************
** constraints force node loads
*CLOAD
** ConstraintForce
** node loads on shape: BooleanFragments:Face92
3,3,-0.1547844827586
116,3,-0.1621551724138
128,3,-0.1978026382912
130,3,-0.1490517241379
797,3,-0.6116717787213
798,3,-0.3806776588428
799,3,-0.4836130574558
800,3,-0.5384186823992
801,3,-0.532423036546
802,3,-0.5198484542656
803,3,-0.4988540872618
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
** node loads on shape: BooleanFragments:Face91
4,3,-0.2033245626977
122,3,-0.1968349351868
125,3,-0.1547844827586
126,3,-0.1621551724138
959,3,-0.4996655201451
960,3,-0.320754400875
961,3,-0.4076146019544
962,3,-0.4600368831833
963,3,-0.4785423821309
964,3,-0.4834891307241
965,3,-0.493471568956
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
** node loads on shape: BooleanFragments:Face93
112,3,-0.164367816092
114,3,-0.1972033174453
118,3,-0.1580459770115
120,3,-0.1960493841837
631,3,-0.4950691505747
632,3,-0.3156074511908
633,3,-0.4060359534047
634,3,-0.4536822980376
635,3,-0.4778134916747
636,3,-0.5040994164686
637,3,-0.5123563234274
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
** node loads on shape: BooleanFragments:Face95
108,3,-0.1508620689655
132,3,-0.164367816092
135,3,-0.1580459770115
136,3,-0.1994359813118
301,3,-0.4855994469531
302,3,-0.4509921876833
303,3,-0.489859519647
304,3,-0.482394217452
305,3,-0.483353370507
306,3,-0.4792072942438
307,3,-0.4683388125912
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
** node loads on shape: BooleanFragments:Face94
1,3,-0.1547844827586
104,3,-0.1621551724138
106,3,-0.209451012002
110,3,-0.1490517241379
467,3,-0.4755939963308
468,3,-0.4223133613321
469,3,-0.433750322135
470,3,-0.447060963721
471,3,-0.4585235932375
472,3,-0.4590004768963
473,3,-0.4518342345789
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
** node loads on shape: BooleanFragments:Face96
2,3,-0.1561494252874
98,3,-0.1621551724138
100,3,-0.1547844827586
102,3,-0.1490517241379
137,3,-0.6517907900115
138,3,-0.4957671401806
139,3,-0.4560558819853
140,3,-0.4303013979285
141,3,-0.445603554747
142,3,-0.4724494443752
143,3,-0.4906428257565
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

***********************************************************
** Outputs --> frd file
*NODE FILE
U
*EL FILE
S, E
** outputs --> dat file
** reaction forces for Constraint fixed
*NODE PRINT, NSET=ConstraintFixed, TOTALS=ONLY
RF

*OUTPUT, FREQUENCY=1
***********************************************************
*END STEP

***********************************************************
** CalculiX Input file
**   written by    --> FreeCAD 1.0.0
**   written on    --> Tue Mar  4 22:40:46 2025
**   file name     --> Rectangle.FCStd
**   analysis name --> Analysis
**
**
***********************************************************
**  About units:
**  See ccx manual, ccx does not know about any unit.
**  Golden rule: The user must make sure that the numbers they provide have consistent units.
**  The user is the FreeCAD calculix writer module ;-)
**
**  The unit system which is used at Guido Dhondt's company: mm, N, s, K
**  Since Length and Mass are connected by Force, if Length is mm the Mass is in t to get N
**  The following units are used to write to inp file:
**
**  Length: mm (this includes the mesh geometry)
**  Mass: t
**  TimeSpan: s
**  Temperature: K
**
**  This leads to:
**  Force: N
**  Pressure: N/mm^2 == MPa (Young's Modulus has unit Pressure)
**  Density: t/mm^3
**  Gravity: mm/s^2
**  Thermal conductivity: t*mm/K/s^3 == as W/m/K == kW/mm/K
**  Specific Heat: mm^2/s^2/K = J/kg/K == kJ/t/K
**
